// COMSOL Multiphysics 5.4.0.225 model "0.672final.mph"
// Outline of the model tree

Parameters
  ww = 5[mm]
  d = 20[mm]
  f0 = 500[Hz]
  dvisc = 0.22[mm]*sqrt(100[Hz]/f0)
  f_max = 6400[Hz]
  lbd = 343[m/s]/f_max

Couplings
  aveop1: Average on boundaries 19 | axisym = on

Geometry
  geom1 "Geometry 1" (2D axisymmetric, length unit cm)
    r1: Rectangle | size = {0.672, ww*3}
    r2: Rectangle | pos = {0, ww*3}; size = {0.761, ww*3}
    r3: Rectangle | pos = {0, ww*6}; size = {0.915, ww*3}
    r4: Rectangle | pos = {0, ww*3*3}; size = {1.009, ww*3}
    r5: Rectangle | pos = {0, ww*3*4}; size = {0.648, ww*3}
    r6: Rectangle | pos = {0, -1.2}; layername = Layer 1; layer = 0.2; size = {1.45, 1.2}
    r7: Rectangle
      pos = {0, ww*3*5}
      layername = Layer 1
      layer = 0.2
      layerbottom = off
      layertop = on
      size = {1.45, 1.2}
    fin: Finalize "Form Union"

Materials
  mat2: Common "Air 1" on all domains
    def "Basic"
      relpermeability = 1
      relpermittivity = 1
      dynamicviscosity = eta(T[1/K])[Pa*s]
      ratioofspecificheat = 1.4
      electricconductivity = 0[S/m]
      heatcapacity = Cp(T[1/K])[J/(kg*K)]
      density = rho(pA[1/Pa],T[1/K])[kg/m^3]
      thermalconductivity = k(T[1/K])[W/(m*K)]
      soundspeed = cs(T[1/K])[m/s]
      bulkviscosity = 0
      eta: Piecewise | arg = T; pieces = {200.0, 1600.0, -8.38278E-7+8.35717342E-8*T^1-7.69429583E-11*T^2+4.6437266E-14*T^3-1.06585607E-17*T^4}
      Cp: Piecewise | arg = T; pieces = {200.0, 1600.0, 1047.63657-0.372589265*T^1+9.45304214E-4*T^2-6.02409443E-7*T^3+1.2858961E-10*T^4}
      rho: Analytic | expr = pA*0.02897/R_const[K*mol/J]/T; args = {pA, T}; dermethod = manual; argders = {{pA, d(pA*0.02897/R_const/T,pA)}, {T, d(pA*0.02897/R_const/T,T)}}
      k: Piecewise | arg = T; pieces = {200.0, 1600.0, -0.00227583562+1.15480022E-4*T^1-7.90252856E-8*T^2+4.11702505E-11*T^3-7.43864331E-15*T^4}
      cs: Analytic | expr = sqrt(1.4*287*T); args = T; dermethod = manual; argders = {T, d(sqrt(1.4*287*T),T)}
    RefractiveIndex
      n = 1
      ki = 0

Physics
  acpr: PressureAcoustics "Pressure Acoustics, Frequency Domain" on all domains
    dependent variable p
    fpam1: FrequencyPressureAcousticsModel "Pressure Acoustics 1" (default)
    axi1: AxialSymmetry (default)
    shb1: SoundHard "Sound Hard Boundary (Wall) 1" (default)
    init1: init "Initial Values 1" (default)
    pwr1: PlaneWaveRadiation on boundaries 2
      ipf1: IncidentPressureField on all boundaries | pamp = 1; c = 343
    pwr2: PlaneWaveRadiation on boundaries 19
    imp1: Impedance on boundaries 20-34 | Zi = 1180[kg/m^3]*2700[m/s]
  ta: ThermoacousticsSinglePhysics "Thermoviscous Acoustics, Frequency Domain" on domains 1-9
    dependent variable p2
    tam1: ThermoviscousAcousticsModel (default)
    axi1: AxialSymmetry (default)
    wall1: Wall (default)
    init1: init "Initial Values 1" (default)

Multiphysics
  atb1: AcousticThermoacousticBoundary "Acoustic-Thermoviscous Acoustic Boundary 1" on all boundaries
    Acoustics_physics = acpr
    Thermoacoustics_physics = ta

Mesh
  mesh1 "Mesh 1"
    size: MeshSizeDefault | hmax = lbd/100; hmin = lbd/501; hauto = 2
    bl1: BndLayer "Boundary Layers 1" on entire geometry
      blp: BndLayerProp "Boundary Layer Properties" on boundaries 20, 23, 26, 28, 30-34
        inittype = blhmin
        blhminfact = dvisc
        blhmin = dvisc/10

Studies
  std1 "Study 1"
    freq: Frequency "Frequency Domain" | plist = range(20,40,6400)

Tables
  tbl1: Table
    // Line Average 1 (abs(acpr.p_t)^2)
    freq (Hz) | abs(acpr.p_t)^2 (kg^2/(m^2*s^4))
    20 | 0.996627
    60 | 0.977026
    100 | 0.940394
    140 | 0.891092
    180 | 0.834118
    220 | 0.774084
    260 | 0.714626
    300 | 0.658235
    340 | 0.606379
    380 | 0.559749
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
Plots
  pg16: PlotGroup1D "1D Plot Group 16" | data = none
    tblp1: Table "Table Graph 1" | table = tbl1